*Heading
** Job name: Test Model name: Test
** Generated by: Abaqus/CAE 2023
*Preprint, echo=NO, model=NO, history=NO, contact=NO
**
** PARTS
**
*Part, name=Plate
*Node
      1,           0.,           0.,           0.
      2, 0.0500000007,           0.,           0.
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*Element, type=S4R
  1,   1,   2,  23,  22
  2,   2,   3,  24,  23
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*Nset, nset=_PickedSet4, internal, generate
   1,  441,    1
*Elset, elset=_PickedSet4, internal, generate
   1,  400,    1
** Section: Plate
*Shell Section, elset=_PickedSet4, material=Steel
0.01, 5
*End Part
**
**
** ASSEMBLY
**
*Assembly, name=Assembly
**
*Instance, name=Plate-1, part=Plate
*End Instance
**
*Nset, nset=_PickedSet4, internal, instance=Plate-1
   1,   2,   3,   4,   5,   6
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*Elset, elset=_PickedSet4, internal, instance=Plate-1
   1,   2,   3,   4,   5,   6
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*Elset, elset=__PickedSurf5_SPOS, internal, instance=Plate-1, generate
   1,  400,    1
*Surface, type=ELEMENT, name=_PickedSurf5, internal
__PickedSurf5_SPOS, SPOS
*End Assembly
**
** MATERIALS
**
*Material, name=Steel
*Elastic
 2.1e+11, 0.3
** ----------------------------------------------------------------
**
** STEP: Step-1
**
*Step, name=Step-1, nlgeom=NO
*Static
0.1, 1., 1e-05, 1.
**
** BOUNDARY CONDITIONS
**
** Name: Fixed Type: Symmetry/Antisymmetry/Encastre
*Boundary
_PickedSet4, ENCASTRE
**
** LOADS
**
** Name: Pressure   Type: Pressure
*Dsload
_PickedSurf5, P, 1e+06
**
** OUTPUT REQUESTS
**
*Restart, write, frequency=0
**
** FIELD OUTPUT: F-Output-1
**
*Output, field, variable=PRESELECT
**
** HISTORY OUTPUT: H-Output-1
**
*Output, history, variable=PRESELECT
*End Step
